l[0, 1] := 1
l[1, 2] := 3
l[1, 7] := 0.001
l[2, 3] := 2
l[2, 7] := 0.001
l[3, 4] := 2
l[3, 7] := 0.01
l[4, 5] := 0.2
l[4, 6] := 0.6
p := [1; 0; 0; 0; 0; 0; 0; 0]
l = [
    0, 1, 0, 0, 0, 0, 0, 0;
    0, 0, 3, 0, 0, 0, 0, 0.001;
    0, 0, 0, 2, 0, 0, 0, 0.001;
    0, 0, 0, 0, 2, 0, 0, 0.01;
    0, 0, 0, 0, 0, 0.2, 0.6, 0
]
l[5, 0] := 2
l[6, 0] := 2
l[7, 0] := 2
D(t, p) := [
    l[7, 0]*p[7] + l[5, 0]*p[5] + l[6, 0]*p[6] - l[0, 1]*p[0];
    l[0, 1]*p[0] - l[1, 2]*p[1] - l[1, 7]*p[1];
    l[1, 2]*p[1] - l[2, 7]*p[2] - l[2, 3]*p[2];
    l[2, 3]*p[2] - l[3, 7]*p[3] - l[3, 4]*p[3];
    l[3, 4]*p[3] - l[4, 5]*p[4] - l[4, 6]*p[4];
    l[4, 5]*p[4] - l[5, 0]*p[5];
    l[4, 6]*p[4] - l[6, 0]*p[6];
    l[1, 7]*p[1] + l[2, 7]*p[2] + l[3, 7]*p[3] - l[7, 0]*p[7]
]
A := [
    -l[0, 1], 0, 0, 0, 0, l[5, 0], l[6, 0], l[7, 0];
    l[0, 1], -l[1, 2] - l[1, 7], 0, 0, 0, 0, 0, 0;
    0, l[1, 2], -l[2, 7] - l[2, 3], 0, 0, 0, 0, 0;
    0, 0, l[2, 3], -l[3, 7] - l[3, 4], 0, 0, 0, 0;
    0, 0, 0, l[3, 4], -l[4, 5] - l[4, 6], 0, 0, 0;
    0, 0, 0, 0, l[4, 5], -l[5, 0], 0, 0;
    0, 0, 0, 0, l[4, 6], 0, -l[6, 0], 0;
    0, l[1, 7], l[2, 7], l[3, 7], 0, 0, 0, -l[7, 0]
]
Z := rkfixed(p, 0, 5, 15, D)
Z = [
    0, 1, 0, 0, 0, 0, 0, 0, 0;
    0.333333, 0.716572, 0.170753, 0.094125, 0.0123086, 0.00617284, 0, 0, 6.8411e-5;
    0.666667, 0.514354, 0.186425, 0.187248, 0.0768513, 0.0315351, 0.000838212, 0.00251464, 0.00023345;
    1, 0.37341, 0.158212, 0.222761, 0.141593, 0.0898135, 0.00342985, 0.0102896, 0.000491419;
    1.33333, 0.281006, 0.124594, 0.21624, 0.180117, 0.164785, 0.00812889, 0.0243867, 0.000742517;
    1.66667, 0.227354, 0.0977938, 0.190557, 0.190743, 0.236005, 0.0141583, 0.042475, 0.000914576;
    2, 0.202998, 0.0804315, 0.161571, 0.182319, 0.290481, 0.0203024, 0.0609073, 0.000988803;
    2.33333, 0.198566, 0.0715288, 0.137554, 0.165038, 0.324135, 0.0255487, 0.0766461, 0.000983038;
    2.66667, 0.205608, 0.0688653, 0.121406, 0.146599, 0.33915, 0.0293606, 0.0880818, 0.000929134;
    3, 0.217435, 0.0700552, 0.112875, 0.131419, 0.340709, 0.0316621, 0.0949862, 0.000857419;
    3.33333, 0.229502, 0.073075, 0.110215, 0.121175, 0.334492, 0.0326878, 0.0980634, 0.000789518;
    3.66667, 0.23929, 0.0764768, 0.11128, 0.115731, 0.325232, 0.0328133, 0.09844, 0.000737061;
    4, 0.245878, 0.0794029, 0.114153, 0.114019, 0.316155, 0.0324221, 0.0972662, 0.000703496;
    4.33333, 0.249403, 0.0814828, 0.117432, 0.114695, 0.308993, 0.0318267, 0.09548, 0.000686972;
    4.66667, 0.250552, 0.0826846, 0.120272, 0.11654, 0.304313, 0.0312389, 0.0937168, 0.000683068;
    5, 0.250174, 0.0831667, 0.122302, 0.118653, 0.301925, 0.0307731, 0.0923192, 0.00068684
]
A = [
    -1, 0, 0, 0, 0, 2, 2, 2;
    1, -3.001, 0, 0, 0, 0, 0, 0;
    0, 3, -2.001, 0, 0, 0, 0, 0;
    0, 0, 2, -2.01, 0, 0, 0, 0;
    0, 0, 0, 2, -0.8, 0, 0, 0;
    0, 0, 0, 0, 0.2, -2, 0, 0;
    0, 0, 0, 0, 0.6, 0, -2, 0;
    0, 0.001, 0.001, 0.01, 0, 0, 0, -2
]
eigenvals(A) = [1.14818e-16; -0.909156 + 1.27764i; -0.909156 - 1.27764i; -3.61457; -2.68956 + 1.27099i; -2.68956 - 1.27099i; -2; -2]
n := 1 .. 15
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b := [0; 0; 0; 0; 0; 0; 0; 1]
a2 := [-0.5, 0, 0, 0.8, 2; 0.5, -2, 0, 0, 0; 0, 2, -3, 0, 0; 0, 0, 1.5, -0.8, 0; 0, 0, 1.5, 0, -2]
b2 := [0; 1; 0; 0; 0]
lsolve(A, b) = [4.45963e15; 1.48605e15; 2.22796e15; 2.21687e15; 5.54219e15; 5.54219e14; 1.66266e15; 1.29414e13]
lsolve(a2, b2) =  # error: This calculation does not converge to a solution.
